1*□
x2 := [-3; 0; 3; -2; -2; 2; 2; -3]
y2 := [0; 4; 0; 0; -4; -4; 0; 0]
Xlw := 100
Xhw := 400
Ylw := 200
Yhw := 500
XL := min(x2)
YH := max(y2)  # - левый верхинй угол в МСК
XL = -3
YH = 4
XH := max(x2)
YL := min(y2)  # - правый нижний угол в МСК
XH = 3
YL = -4
dXw := Xhw - Xlw
dXw = 300  # - ширина области отображения ОСК
dX := XH - XL
dX = 6  # - ширина области отображения МСК
dYw := Yhw - Ylw
dYw = 300  # - Высота облсти отображени ОСК
dY := YH - YL
dY = 8  # - Высота области отображения МСК
Kx := dXw/dX
Kx = 50
Ky := dYw/dY
Ky = 37.5
Tsw := [Kx, 0, Xlw - Kx*XL; 0, Ky, Yhw + Ky*YL; 0, 0, 1]
Tsw = [50, 0, 250; 0, 37.5, 350; 0, 0, 1]  # - Матрица пересчета из МСК в ОСК, находим xw yw
# Вычисляем координаты вершин в ОСК
Mabc := [-3, 0, 3, -2, -2, 2, 2; 0, 4, 0, 0, -4, -4, 0; 1, 1, 1, 1, 1, 1, 1]
Mabc_w := Tsw*Mabc
Mabc_w = [100, 250, 400, 150, 150, 350, 350; 350, 500, 350, 350, 200, 200, 350; 1, 1, 1, 1, 1, 1, 1]
Vaw := Mabc_w[:, 0]
Vaw = [100; 350; 1]
Vbw := Mabc_w[:, 1]
Vbw = [250; 500; 1]
Vcw := Mabc_w[:, 2]
Vcw = [400; 350; 1]
Vdw := Mabc_w[:, 3]
Vdw = [150; 350; 1]
Vew := Mabc_w[:, 4]
Vew = [150; 200; 1]
Vfw := Mabc_w[:, 5]
Vfw = [350; 200; 1]
Vhw := Mabc_w[:, 6]
Vhw = [350; 350; 1]
Xw := transpose([Vaw[0], Vbw[0], Vcw[0], Vdw[0], Vew[0], Vfw[0], Vhw[0], Vaw[0]])
Yw := transpose([Vaw[1], Vbw[1], Vcw[1], Vdw[1], Vew[1], Vfw[1], Vhw[1], Vaw[1]])
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2
F(x) := sin(π*x)*sqrt(|x|)
x[1] := -6
x[2] := 6
dx := 0.1
xLW := 100
yLW := 200
xHW := 800
yHW := 900
N := round((x[2] - x[1])/dx)
N = 120  # - Число точек графика
# Заполняем массивы X, Y, Z значениями Xi, Yi = F(Xi) и 1 соответственно в МСК
i := 0 .. N
x[i] := x[1] + i*dx
Y[i] := F(x[i])
Z[i] := 1  # - x, y координаты точек графика в МСК
# Определяем область графика в МСК
xL := min(x)
yH := max(Y)  # - левый верхний угол в МСК
xL = -6
yH = 2.34521
xH := max(x)
yL := min(Y)  # - правый нижний угол в МСК
xH = 6.1
yL = -2.34521
# Формируем матрицу координат точек графика в МСК
Ms := stack(transpose(x), transpose(Y), transpose(Z))
# Вычсляем параметры, необходимые для формирования матрицы пересчета кооринат из МСК в ОСК
DXw := xHW - xLW
DXw = 700
DX := xH - xL
DX = 12.1
DYw := yHW - yLW
DYw = 700
DY := yH - yL
DY = 4.69042
KX := DXw/DX
KX = 57.8512
KY := DYw/DY
KY = 149.241
# Формируем матрицу пересчёта из МСК в ОСК
TSW := [KX, 0, xLW - KX*xL; 0, -KY, yHW + KY*yL; 0, 0, 1]
# Вычисляем матрицу координат точек графика в оконной системе координат
Mw := TSW*Ms  # - Координаты точек графика в ОСК
Mw = [
    100, 105.785, 117.355, 123.14, 128.926, 134.711, 140.496, 146.281, 152.066, 157.851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;
    550, 437.98, 261.742, 214.118, 200, 220.17, 272.04, 349.965, 445.851, 550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;
    1, 1, 1, 1, 1, 1, 1, 1, 1, 1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]
# Из матрицы Mw выбираем (x, y) - координаты точек графика для отображения
Xw := transpose(Mw)[:, 0]
Yw := transpose(Mw)[:, 1]
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Yw = [
    550; 437.98; 261.742; 214.118; 200; 220.17; 272.04; 349.965; 445.851; 550
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]
Xw = [
    100; 105.785; 117.355; 123.14; 128.926; 134.711; 140.496; 146.281; 152.066; 157.851
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]
