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Xa := -2
Xb := -3
Xc := 0
Xd := 3
Xe := 2
Xf := -2
Xh := 2
Ya := -4
Yb := 0
Yc := 4
Yd := 0
Ye := -4
Yf := 0
Yh := 0
Xlw := 100
Ylw := 200
Xhw := 400
Yhw := 500
Zx := transpose([Xa, Xb, Xc, Xd, Xe, Xf, Xh])
Zy := transpose([Ya, Yb, Yc, Yd, Ye, Yf, Yh])
Xl := min(Zx) = -3
Xg := max(Zx) = 3  # - левый верхинй угол в МСК
Yg := max(Zy) = 4
Yl := min(Zy) = -4  # - правый нижний угол в МСК
qXw := Xhw - Xlw = 300
qX := Xh - Xl = 5  # - ширина области отображения ОСК, МСК
qYw := Yhw - Ylw = 300
qY := Yh - Yl = 4
# - Высота облсти отображени ОСК, МСК
Kx := qXw/qX = 60
Ky := qYw/qY = 75
Tsw := [Kx, 0, Xlw - Kx*Xl; 0, -Ky, Yhw + Ky*Yl; 0, 0, 1]  # - Матрица пересчета из МСК в ОСК
[Xaw; Yaw; q] := Tsw*[Xa; Ya; 1]
[Xbw; Ybw; q] := Tsw*[Xb; Yb; 1]
[Xcw; Ycw; q] := Tsw*[Xc; Yc; 1]
[Xdw; Ydw; q] := Tsw*[Xd; Yd; 1]
[Xew; Yew; q] := Tsw*[Xe; Ye; 1]
[Xfw; Yfw; q] := Tsw*[Xf; Yf; 1]
[Xhw; Yhw; q] := Tsw*[Xh; Yh; 1]
[Xaw; Yaw; q] = [160; 500; 1]
[Xhw; Yhw; q] = [400; 200; 1]
[Xcw; Ycw; q] = [280; -100; 1]
[Xbw; Ybw; q] = [100; 200; 1]
[Xdw; Ydw; q] = [460; 200; 1]
[Xew; Yew; q] = [400; 500; 1]
[Xfw; Yfw; q] = [160; 200; 1]
Xw := transpose([Xbw, Xcw, Xdw, Xbw, Xfw, Xaw, Xew, Xhw, Xdw])
Yw := -transpose([Ybw, Ycw, Ydw, Ybw, Yfw, Yaw, Yew, Yhw, Ydw])
Y := transpose([Yb, Yc, Yd, Yb, Yf, Ya, Ye, Yh, Yd])
X := transpose([Xb, Xc, Xd, Xb, Xf, Xa, Xe, Xh, Xd])
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F(x) := sin(π*x)*sqrt(|x|)
x[1] := -6
x[2] := 6
dx := 0.1
xLW := 100
yLW := 200
xHW := 800
yHW := 900
N := round((x[2] - x[1])/dx)
N = 120  # - Число точек графика
# Заполняем массивы X, Y, Z значениями Xi, Yi = F(Xi) и 1 соответственно в МСК
i := 0 .. N
x[i] := x[1] + i*dx
Y[i] := F(x[i])
Z[i] := 1  # - x, y координаты точек графика в МСК
# Определяем область графика в МСК
xL := min(x)
yH := max(Y)  # - левый верхний угол в МСК
xL = -6
yH = 2.34521
xH := max(x)
yL := min(Y)  # - правый нижний угол в МСК
xH = 6.1
yL = -2.34521
# Формируем матрицу координат точек графика в МСК
Ms := stack(transpose(x), transpose(Y), transpose(Z))
# Вычсляем параметры, необходимые для формирования матрицы пересчета кооринат из МСК в ОСК
DXw := xHW - xLW
DXw = 700
DX := xH - xL
DX = 12.1
DYw := yHW - yLW
DYw = 700
DY := yH - yL
DY = 4.69042
KX := DXw/DX
KX = 57.8512
KY := DYw/DY
KY = 149.241
# Формируем матрицу пересчёта из МСК в ОСК
TSW := [KX, 0, xLW - KX*xL; 0, -KY, yHW + KY*yL; 0, 0, 1]
# Вычисляем матрицу координат точек графика в оконной системе координат
Mw := TSW*Ms  # - Координаты точек графика в ОСК
Mw = [
    100, 105.785, 117.355, 123.14, 128.926, 134.711, 140.496, 146.281, 152.066, 157.851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;
    550, 437.98, 261.742, 214.118, 200, 220.17, 272.04, 349.965, 445.851, 550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;
    1, 1, 1, 1, 1, 1, 1, 1, 1, 1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]
# Из матрицы Mw выбираем (x, y) - координаты точек графика для отображения
Xw := transpose(Mw)[:, 0]
Yw := transpose(Mw)[:, 1]
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Yw = [
    550; 437.98; 261.742; 214.118; 200; 220.17; 272.04; 349.965; 445.851; 550
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]
Xw = [
    100; 105.785; 117.355; 123.14; 128.926; 134.711; 140.496; 146.281; 152.066; 157.851
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]
