# 8.
q(x) := exp(-x^2)
i(x) := d/dx(q(x))
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# 9.
h(x, y) := sin(sqrt(x^2 + y^2))/sqrt(x^2 + y^2)
# [component: inputs h]
# 10.
f(x) := x^2 + (x - 2)*sin(x) - 5
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x := -2
x1 := 3
root(f(x), x) = -1.32936
root(f(x), x, 0, 4) = 2.19967
# 11.
x := 12
x1 := -4
o(x) := x^2 + x*sin(2*x) - (x - 5)*cos(x)
root(o(x1), x1) = -2.97354
root(o(x1), x1, -4, -2) = -2.97354
root(o(x1), x1, -2, 0) = -1.93283
# 12 полилном
n := 1
V := [3*n; 3 - 4*n; 4 - n; 1]
M := [3*n, (3 - 4*n), (4 - n), 1]
X := polyroots(V)
X = [-3.5251; 0.262551 - 0.884368i; 0.262551 + 0.884368i]
# 13
n := 3
A := [n, (n + 1), n + 2; n - 3, n - 2, n; n - 1, n, n + 1]
B := [6*n + 8; 6*n - 7; 6*n + 2]
[x; y; z] := A^-1*B
X := [x; y; z]
X = [1; 2; 3]
# 14
n := 4
x := 0 .. n + sqrt(n) + 2
y1(x) := (x - n)^2 - n
y2(x) := (x - n)/2
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Given
x := 2
y := -1
(x - n)^2 - y - n == 0
x - 2*y - n == 0
Find(x, y) = [2.23444; -0.882782]
Given
x := 5
y := 0
(x - n)^2 - y - n == 0
x - 2*y - n == 0
Find(x, y) = [6.26556; 1.13278]
# 15
x := 0 .. 10
f(x) := x*sin(x)
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# первый минимум
x := 0
x := Minimize(f, x)
x = 0
f(x) = 0
# второй минимум
x := 5
x := Minimize(f, x)
x = 4.91318
f(x) = -4.81447
# третий минимум
x := 10
x := Minimize(f, x)
x = 11.0855
f(x) = -11.0407
# первый максимум
x := 2
x := Maximize(f, x)
x = 2.02876
f(x) = 1.81971
# второй максимум
x := 8
x := Maximize(f, x)
f(x) = 7.91673
x = 7.97867
