# 1. Вычислить выражение
x := 2
n := 2
y := (sqrt(x^3 + n) + cos(|n*x - 1|)^2)/(nthroot(x^5 + sin(x) + n, 4)*cos((π/4)*(x + n))) = -1.70417
# 2. Вычислить значение пеемнных
x := 7
y := 10
z := -3
p :=
    sin(x) + 3*|y| - z^2 if (x > y)
    (((y + 3)/sqrt(z^2 + 1))*ln(|x + 1|)) if x ≤ y
p = 8.5485
q :=
    cos(x) + 2*|y + 1| - z if (x > y) and (x < 1)
    ((x*y + 3)/sqrt(y^2 + 5)) otherwise
q = 7.12407
w :=
    (x^2 + 2*(y*x + 1) - z) if (x < y) or (y ≥ 10)
    ((x^3*y^3 + 3)*sqrt(z^2 + 7)) otherwise
w = 194
# 3. Вычислить значения функции
x := -2, -1.6 .. 2
n := 5
f(x) := (x^2 - n*x + sin(x))*sqrt(|x - cos(n*x)|)
f(x) = [14.1048; 11.5301; 9.56509; 1.50067; 0.224988; 0; -1.31047; -3.18616; -1.7767; -5.86657; -8.5776]
x = [-2; -1.6; -1.2; -0.8; -0.4; 0; 0.4; 0.8; 1.2; 1.6; 2]
# 4. Определиить массивы
n := 2
a := -3*n
b := 3*n
a = -6
b = 6
# B=runif (3,а,b)
A := runif(3, a, b)
# C=runif (3,а,b)
B := runif(3, a, b)
C := runif(3, a, b)
A = [-3.72058; -3.8595; -0.510499]
B = [-4.82973; -4.86715; 5.17787]
C = [4.73521; -3.27218; -1.07146]
s := A*B
N := B×C
s = 34.1108
N = [22.1579; 19.3435; 38.8507]
w := (A×B)*C
w = -176.93
dA := sqrt(A[0]^2 + A[1]^2 + A[2]^2)
dB := sqrt(B[0]^2 + B[1]^2 + B[2]^2)
dC := sqrt(C[0]^2 + C[1]^2 + C[2]^2)
dA = 5.38508
dB = 8.59219
dC = 5.85469
Array := [dA; dB; dC]
MaxFromArray := max(Array)
MaxFromArray = 8.59219
# 5. График быстрым способом
x := -3*π .. 3*π
y(x) := e^(-(|x|/3))*cos(x)
y(x) = [-0.0432139; -0.0325856; 0.0350268; 0.116292; 0.107158; -0.0649007; -0.306592; -0.335964; 0.090491; 0.790838; 0.692671; -0.00261785; -0.357656; -0.275584; -0.0297547; 0.118451; 0.106992; 0.0220275; -0.0378758]
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# 6. Постоить график функции
x := -9, -8.75 .. 9
f(x) :=
    (e^x*x^3) if (x < 0)
    (e^(-x)*x^3) if (x ≥ 0)
x = [
    -9; -8.75; -8.5; -8.25; -8; -7.75; -7.5; -7.25; -7; -6.75
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]
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# 7. Выполнить
Δx := π/4
i := 1 .. 16
x1 := -2*π
j := 1 .. 16
x[i] := x1 + i*Δx
g(x) := sqrt(|x|)*sin(x)
x = [0; -5.49779; -4.71239; -3.92699; -3.14159; -2.35619; -1.5708; -0.785398; 0; 0.785398; 1.5708; 2.35619; 3.14159; 3.92699; 4.71239; 5.49779; 6.28319]  # X
g(x) = [0; 2.69879; 3.81667; 2.69879; 0; -2.69879; -3.81667; -2.69879; 0; 2.69879; 3.81667; 2.69879; 0; -2.69879; -3.81667; -2.69879; 0]
Y := g(x)
filename1 := "Matr_X.txt"
Y = [0; 2.69879; 3.81667; 2.69879; 0; -2.69879; -3.81667; -2.69879; 0; 2.69879; 3.81667; 2.69879; 0; -2.69879; -3.81667; -2.69879; 0]
filename2 := "Matr_Y.txt"
WRITEPRN(filename1) := x
WRITEPRN(filename2) := Y
XX := READPRN(filename1)
YY := READPRN(filename2)
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XX = [0; -5.498; -4.712; -3.927; -3.142; -2.356; -1.571; -0.7854; 0; 0.7854; 1.571; 2.356; 3.142; 3.927; 4.712; 5.498; 6.283]
YY = [0; 2.699; 3.817; 2.699; 0; -2.699; -3.817; -2.699; 0; 2.699; 3.817; 2.699; 0; -2.699; -3.817; -2.699; 0]
